// COMSOL Multiphysics 6.3.0.290 model "动态-原始相场-拉伸-sw=0.1.mph"
// Outline of the model tree

Parameters
  E0 = 32[GPa]  // Lama Paramter1
  Nu = 0.2  // Lama Parameter2
  Gc = 3[J/m^2]  // Critial Energy Release Rate
  k = 1e-9  // Control Numerical Sigularity
  l0 = 0.75[mm]
  hmax = 0.25[mm]  // maximum element size
  mu = E0/(2*(1+Nu))  // Lama Paramter1
  lanta = E0*Nu/((1-2*Nu)*(1+Nu))  // Lama Paramter2
  B = 1000/(1-k)
  du = 5*10e-7[mm]  // 每个时步内位移增量
  time1 = 6.86*10e-3[mm]/du
  n = 30[deg]
  x1 = cos(n)
  y1 = sin(n)
  nxdc = 1e-12[kN*s]/1[mm]/1[mm]  // 人工黏性系数
  faixx = 15[deg]  // 岩石内摩擦角度
  Cc = 100[kPa]  // 岩石粘聚力
  GG = E0/(2*(1+Nu))  // 岩石剪切模量,lame常数1

Variables
  var1 "变量 1" on all domains
    n1 = if(tra1>0,(1-k)*(1-u2)^2+k,1)
    m1 = if(solid.ep1>0,(1-k)*(1-u2)^2+k,1)
    n11 = solid.ep1X
    n12 = solid.ep1Y
    n13 = solid.ep1Z
    n21 = solid.ep2X
    n22 = solid.ep2Y
    n23 = solid.ep2Z
    n31 = solid.ep3X
    n32 = solid.ep3Y
    n33 = solid.ep3Z
    d11_p = if(solid.ep1>0,1,0)
    d22_p = if(solid.ep2>0,1,0)
    d33_p = if(solid.ep3>0,1,0)
    d11_n = if(solid.ep1<=0,1,0)
    d22_n = if(solid.ep2<=0,1,0)
    d33_n = if(solid.ep3<=0,1,0)
    l1 = if(solid.ep1>solid.ep2,solid.ep1,solid.ep1+1e-9)
    l2 = solid.ep2
    l3 = if(solid.ep3<solid.ep2,solid.ep3,solid.ep3-1e-9)
    g1_p = if(solid.ep1>solid.ep2,d11_p*solid.ep1,d11_p*solid.ep1+1e-9)
    g2_p = d22_p*solid.ep2
    g3_p = if(solid.ep3<solid.ep2,d33_p*solid.ep3,d33_p*solid.ep3-1e-9)
    g1_n = if(solid.ep1>solid.ep2,d11_n*solid.ep1,d11_n*solid.ep1+1e-9)
    g2_n = d22_n*solid.ep2
    g3_n = if(solid.ep3<solid.ep2,d33_n*solid.ep3,d33_n*solid.ep3-1e-9)
    g1111_p = d11_p*n11*n11*n11*n11+d22_p*n21*n21*n21*n21+d33_p*n31*n31*n31*n31+0.5*(g1_p-g2_p)/(l1-l2)*n11*n21*(n11*n21+n21*n11)+0.5*(g1_p-g3_p)/(l1-l3)*n11*n31*(n11*n31+n31*n11)+0.5*(g2_p-g1_p)/(l2-l1)*n21*n11*(n21*n11+n11*n21)+0.5*(g2_p-g3_p)/(l2-l3)*n21*n31*(n21*n31+n31*n21)+0.5*(g3_p-g1_p)/(l3-l1)*n31*n11*(n31*n11+n11*n31)+0.5*(g3_p-g2_p)/(l3-l2)*n31*n21*(n31*n21+n21*n31)
    g1122_p = d11_p*n11*n11*n12*n12+d22_p*n21*n21*n22*n22+d33_p*n31*n31*n32*n32+0.5*(g1_p-g2_p)/(l1-l2)*n11*n21*(n12*n22+n22*n12)+0.5*(g1_p-g3_p)/(l1-l3)*n11*n31*(n12*n32+n32*n12)+0.5*(g2_p-g1_p)/(l2-l1)*n21*n11*(n22*n12+n12*n22)+0.5*(g2_p-g3_p)/(l2-l3)*n21*n31*(n22*n32+n32*n22)+0.5*(g3_p-g1_p)/(l3-l1)*n31*n11*(n32*n12+n12*n32)+0.5*(g3_p-g2_p)/(l3-l2)*n31*n21*(n32*n22+n22*n32)
    g1133_p = d11_p*n11*n11*n13*n13+d22_p*n21*n21*n23*n23+d33_p*n31*n31*n33*n33+0.5*(g1_p-g2_p)/(l1-l2)*n11*n21*(n13*n23+n23*n13)+0.5*(g1_p-g3_p)/(l1-l3)*n11*n31*(n13*n33+n33*n13)+0.5*(g2_p-g1_p)/(l2-l1)*n21*n11*(n23*n13+n13*n23)+0.5*(g2_p-g3_p)/(l2-l3)*n21*n31*(n23*n33+n33*n23)+0.5*(g3_p-g1_p)/(l3-l1)*n31*n11*(n33*n13+n13*n33)+0.5*(g3_p-g2_p)/(l3-l2)*n31*n21*(n33*n23+n23*n33)
    g1112_p = d11_p*n11*n11*n11*n12+d22_p*n21*n21*n21*n22+d33_p*n31*n31*n31*n32+0.5*(g1_p-g2_p)/(l1-l2)*n11*n21*(n11*n22+n21*n12)+0.5*(g1_p-g3_p)/(l1-l3)*n11*n31*(n11*n32+n31*n12)+0.5*(g2_p-g1_p)/(l2-l1)*n21*n11*(n21*n12+n11*n22)+0.5*(g2_p-g3_p)/(l2-l3)*n21*n31*(n21*n32+n31*n22)+0.5*(g3_p-g1_p)/(l3-l1)*n31*n11*(n31*n12+n11*n32)+0.5*(g3_p-g2_p)/(l3-l2)*n31*n21*(n31*n22+n21*n32)
    g1123_p = d11_p*n11*n11*n12*n13+d22_p*n21*n21*n22*n23+d33_p*n31*n31*n32*n33+0.5*(g1_p-g2_p)/(l1-l2)*n11*n21*(n12*n23+n22*n13)+0.5*(g1_p-g3_p)/(l1-l3)*n11*n31*(n12*n33+n32*n13)+0.5*(g2_p-g1_p)/(l2-l1)*n21*n11*(n22*n13+n12*n23)+0.5*(g2_p-g3_p)/(l2-l3)*n21*n31*(n22*n33+n32*n23)+0.5*(g3_p-g1_p)/(l3-l1)*n31*n11*(n32*n13+n12*n33)+0.5*(g3_p-g2_p)/(l3-l2)*n31*n21*(n32*n23+n22*n33)
    g1113_p = d11_p*n11*n11*n11*n13+d22_p*n21*n21*n21*n23+d33_p*n31*n31*n31*n33+0.5*(g1_p-g2_p)/(l1-l2)*n11*n21*(n11*n23+n21*n13)+0.5*(g1_p-g3_p)/(l1-l3)*n11*n31*(n11*n33+n31*n13)+0.5*(g2_p-g1_p)/(l2-l1)*n21*n11*(n21*n13+n11*n23)+0.5*(g2_p-g3_p)/(l2-l3)*n21*n31*(n21*n33+n31*n23)+0.5*(g3_p-g1_p)/(l3-l1)*n31*n11*(n31*n13+n11*n33)+0.5*(g3_p-g2_p)/(l3-l2)*n31*n21*(n31*n23+n21*n33)
    g2222_p = d11_p*n12*n12*n12*n12+d22_p*n22*n22*n22*n22+d33_p*n32*n32*n32*n32+0.5*(g1_p-g2_p)/(l1-l2)*n12*n22*(n12*n22+n22*n12)+0.5*(g1_p-g3_p)/(l1-l3)*n12*n32*(n12*n32+n32*n12)+0.5*(g2_p-g1_p)/(l2-l1)*n22*n12*(n22*n12+n12*n22)+0.5*(g2_p-g3_p)/(l2-l3)*n22*n32*(n22*n32+n32*n22)+0.5*(g3_p-g1_p)/(l3-l1)*n32*n12*(n32*n12+n12*n32)+0.5*(g3_p-g2_p)/(l3-l2)*n32*n22*(n32*n22+n22*n32)
    g2233_p = d11_p*n12*n12*n13*n13+d22_p*n22*n22*n23*n23+d33_p*n32*n32*n33*n33+0.5*(g1_p-g2_p)/(l1-l2)*n12*n22*(n13*n23+n23*n13)+0.5*(g1_p-g3_p)/(l1-l3)*n12*n32*(n13*n33+n33*n13)+0.5*(g2_p-g1_p)/(l2-l1)*n22*n12*(n23*n13+n13*n23)+0.5*(g2_p-g3_p)/(l2-l3)*n22*n32*(n23*n33+n33*n23)+0.5*(g3_p-g1_p)/(l3-l1)*n32*n12*(n33*n13+n13*n33)+0.5*(g3_p-g2_p)/(l3-l2)*n32*n22*(n33*n23+n23*n33)
    g2212_p = d11_p*n12*n12*n11*n12+d22_p*n22*n22*n21*n22+d33_p*n32*n32*n31*n32+0.5*(g1_p-g2_p)/(l1-l2)*n12*n22*(n11*n22+n21*n12)+0.5*(g1_p-g3_p)/(l1-l3)*n12*n32*(n11*n32+n31*n12)+0.5*(g2_p-g1_p)/(l2-l1)*n22*n12*(n21*n12+n11*n22)+0.5*(g2_p-g3_p)/(l2-l3)*n22*n32*(n21*n32+n31*n22)+0.5*(g3_p-g1_p)/(l3-l1)*n32*n12*(n31*n12+n11*n32)+0.5*(g3_p-g2_p)/(l3-l2)*n32*n22*(n31*n22+n21*n32)
    g2223_p = d11_p*n12*n12*n12*n13+d22_p*n22*n22*n22*n23+d33_p*n32*n32*n32*n33+0.5*(g1_p-g2_p)/(l1-l2)*n12*n22*(n12*n23+n22*n13)+0.5*(g1_p-g3_p)/(l1-l3)*n12*n32*(n12*n33+n32*n13)+0.5*(g2_p-g1_p)/(l2-l1)*n22*n12*(n22*n13+n12*n23)+0.5*(g2_p-g3_p)/(l2-l3)*n22*n32*(n22*n33+n32*n23)+0.5*(g3_p-g1_p)/(l3-l1)*n32*n12*(n32*n13+n12*n33)+0.5*(g3_p-g2_p)/(l3-l2)*n32*n22*(n32*n23+n22*n33)
    g2213_p = d11_p*n12*n12*n11*n13+d22_p*n22*n22*n21*n23+d33_p*n32*n32*n31*n33+0.5*(g1_p-g2_p)/(l1-l2)*n12*n22*(n11*n23+n21*n13)+0.5*(g1_p-g3_p)/(l1-l3)*n12*n32*(n11*n33+n31*n13)+0.5*(g2_p-g1_p)/(l2-l1)*n22*n12*(n21*n13+n11*n23)+0.5*(g2_p-g3_p)/(l2-l3)*n22*n32*(n21*n33+n31*n23)+0.5*(g3_p-g1_p)/(l3-l1)*n32*n12*(n31*n13+n11*n33)+0.5*(g3_p-g2_p)/(l3-l2)*n32*n22*(n31*n23+n21*n33)
    g3333_p = d11_p*n13*n13*n13*n13+d22_p*n23*n23*n23*n23+d33_p*n33*n33*n33*n33+0.5*(g1_p-g2_p)/(l1-l2)*n13*n23*(n13*n23+n23*n13)+0.5*(g1_p-g3_p)/(l1-l3)*n13*n33*(n13*n33+n33*n13)+0.5*(g2_p-g1_p)/(l2-l1)*n23*n13*(n23*n13+n13*n23)+0.5*(g2_p-g3_p)/(l2-l3)*n23*n33*(n23*n33+n33*n23)+0.5*(g3_p-g1_p)/(l3-l1)*n33*n13*(n33*n13+n13*n33)+0.5*(g3_p-g2_p)/(l3-l2)*n33*n23*(n33*n23+n23*n33)
    g3312_p = d11_p*n13*n13*n11*n12+d22_p*n23*n23*n21*n22+d33_p*n33*n33*n31*n32+0.5*(g1_p-g2_p)/(l1-l2)*n13*n23*(n11*n22+n21*n12)+0.5*(g1_p-g3_p)/(l1-l3)*n13*n33*(n11*n32+n31*n12)+0.5*(g2_p-g1_p)/(l2-l1)*n23*n13*(n21*n12+n11*n22)+0.5*(g2_p-g3_p)/(l2-l3)*n23*n33*(n21*n32+n31*n22)+0.5*(g3_p-g1_p)/(l3-l1)*n33*n13*(n31*n12+n11*n32)+0.5*(g3_p-g2_p)/(l3-l2)*n33*n23*(n31*n22+n21*n32)
    g3323_p = d11_p*n13*n13*n12*n13+d22_p*n23*n23*n22*n23+d33_p*n33*n33*n32*n33+0.5*(g1_p-g2_p)/(l1-l2)*n13*n23*(n12*n23+n22*n13)+0.5*(g1_p-g3_p)/(l1-l3)*n13*n33*(n12*n33+n32*n13)+0.5*(g2_p-g1_p)/(l2-l1)*n23*n13*(n22*n13+n12*n23)+0.5*(g2_p-g3_p)/(l2-l3)*n23*n33*(n22*n33+n32*n23)+0.5*(g3_p-g1_p)/(l3-l1)*n33*n13*(n32*n13+n12*n33)+0.5*(g3_p-g2_p)/(l3-l2)*n33*n23*(n32*n23+n22*n33)
    g3313_p = d11_p*n13*n13*n11*n13+d22_p*n23*n23*n21*n23+d33_p*n33*n33*n31*n33+0.5*(g1_p-g2_p)/(l1-l2)*n13*n23*(n11*n23+n21*n13)+0.5*(g1_p-g3_p)/(l1-l3)*n13*n33*(n11*n33+n31*n13)+0.5*(g2_p-g1_p)/(l2-l1)*n23*n13*(n21*n13+n11*n23)+0.5*(g2_p-g3_p)/(l2-l3)*n23*n33*(n21*n33+n31*n23)+0.5*(g3_p-g1_p)/(l3-l1)*n33*n13*(n31*n13+n11*n33)+0.5*(g3_p-g2_p)/(l3-l2)*n33*n23*(n31*n23+n21*n33)
    g1212_p = d11_p*n11*n12*n11*n12+d22_p*n21*n22*n21*n22+d33_p*n31*n32*n31*n32+0.5*(g1_p-g2_p)/(l1-l2)*n11*n22*(n11*n22+n21*n12)+0.5*(g1_p-g3_p)/(l1-l3)*n11*n32*(n11*n32+n31*n12)+0.5*(g2_p-g1_p)/(l2-l1)*n21*n12*(n21*n12+n11*n22)+0.5*(g2_p-g3_p)/(l2-l3)*n21*n32*(n21*n32+n31*n22)+0.5*(g3_p-g1_p)/(l3-l1)*n31*n12*(n31*n12+n11*n32)+0.5*(g3_p-g2_p)/(l3-l2)*n31*n22*(n31*n22+n21*n32)
    g1223_p = d11_p*n11*n12*n12*n13+d22_p*n21*n22*n22*n23+d33_p*n31*n32*n32*n33+0.5*(g1_p-g2_p)/(l1-l2)*n11*n22*(n12*n23+n22*n13)+0.5*(g1_p-g3_p)/(l1-l3)*n11*n32*(n12*n33+n32*n13)+0.5*(g2_p-g1_p)/(l2-l1)*n21*n12*(n22*n13+n12*n23)+0.5*(g2_p-g3_p)/(l2-l3)*n21*n32*(n22*n33+n32*n23)+0.5*(g3_p-g1_p)/(l3-l1)*n31*n12*(n32*n13+n12*n33)+0.5*(g3_p-g2_p)/(l3-l2)*n31*n22*(n32*n23+n22*n33)
    g1213_p = d11_p*n11*n12*n11*n13+d22_p*n21*n22*n21*n23+d33_p*n31*n32*n31*n33+0.5*(g1_p-g2_p)/(l1-l2)*n11*n22*(n11*n23+n21*n13)+0.5*(g1_p-g3_p)/(l1-l3)*n11*n32*(n11*n33+n31*n13)+0.5*(g2_p-g1_p)/(l2-l1)*n21*n12*(n21*n13+n11*n23)+0.5*(g2_p-g3_p)/(l2-l3)*n21*n32*(n21*n33+n31*n23)+0.5*(g3_p-g1_p)/(l3-l1)*n31*n12*(n31*n13+n11*n33)+0.5*(g3_p-g2_p)/(l3-l2)*n31*n22*(n31*n23+n21*n33)
    g2323_p = d11_p*n12*n13*n12*n13+d22_p*n22*n23*n22*n23+d33_p*n32*n33*n32*n33+0.5*(g1_p-g2_p)/(l1-l2)*n12*n23*(n12*n23+n22*n13)+0.5*(g1_p-g3_p)/(l1-l3)*n12*n33*(n12*n33+n32*n13)+0.5*(g2_p-g1_p)/(l2-l1)*n22*n13*(n22*n13+n12*n23)+0.5*(g2_p-g3_p)/(l2-l3)*n22*n33*(n22*n33+n32*n23)+0.5*(g3_p-g1_p)/(l3-l1)*n32*n13*(n32*n13+n12*n33)+0.5*(g3_p-g2_p)/(l3-l2)*n32*n23*(n32*n23+n22*n33)
    g2313_p = d11_p*n12*n13*n11*n13+d22_p*n22*n23*n21*n23+d33_p*n32*n33*n31*n33+0.5*(g1_p-g2_p)/(l1-l2)*n12*n23*(n11*n23+n21*n13)+0.5*(g1_p-g3_p)/(l1-l3)*n12*n33*(n11*n33+n31*n13)+0.5*(g2_p-g1_p)/(l2-l1)*n22*n13*(n21*n13+n11*n23)+0.5*(g2_p-g3_p)/(l2-l3)*n22*n33*(n21*n33+n31*n23)+0.5*(g3_p-g1_p)/(l3-l1)*n32*n13*(n31*n13+n11*n33)+0.5*(g3_p-g2_p)/(l3-l2)*n32*n23*(n31*n23+n21*n33)
    g1313_p = d11_p*n11*n13*n11*n13+d22_p*n21*n23*n21*n23+d33_p*n31*n33*n31*n33+0.5*(g1_p-g2_p)/(l1-l2)*n11*n23*(n11*n23+n21*n13)+0.5*(g1_p-g3_p)/(l1-l3)*n11*n33*(n11*n33+n31*n13)+0.5*(g2_p-g1_p)/(l2-l1)*n21*n13*(n21*n13+n11*n23)+0.5*(g2_p-g3_p)/(l2-l3)*n21*n33*(n21*n33+n31*n23)+0.5*(g3_p-g1_p)/(l3-l1)*n31*n13*(n31*n13+n11*n33)+0.5*(g3_p-g2_p)/(l3-l2)*n31*n23*(n31*n23+n21*n33)
    g1111_n = d11_n*n11*n11*n11*n11+d22_n*n21*n21*n21*n21+d33_n*n31*n31*n31*n31+0.5*(g1_n-g2_n)/(l1-l2)*n11*n21*(n11*n21+n21*n11)+0.5*(g1_n-g3_n)/(l1-l3)*n11*n31*(n11*n31+n31*n11)+0.5*(g2_n-g1_n)/(l2-l1)*n21*n11*(n21*n11+n11*n21)+0.5*(g2_n-g3_n)/(l2-l3)*n21*n31*(n21*n31+n31*n21)+0.5*(g3_n-g1_n)/(l3-l1)*n31*n11*(n31*n11+n11*n31)+0.5*(g3_n-g2_n)/(l3-l2)*n31*n21*(n31*n21+n21*n31)
    g1122_n = d11_n*n11*n11*n12*n12+d22_n*n21*n21*n22*n22+d33_n*n31*n31*n32*n32+0.5*(g1_n-g2_n)/(l1-l2)*n11*n21*(n12*n22+n22*n12)+0.5*(g1_n-g3_n)/(l1-l3)*n11*n31*(n12*n32+n32*n12)+0.5*(g2_n-g1_n)/(l2-l1)*n21*n11*(n22*n12+n12*n22)+0.5*(g2_n-g3_n)/(l2-l3)*n21*n31*(n22*n32+n32*n22)+0.5*(g3_n-g1_n)/(l3-l1)*n31*n11*(n32*n12+n12*n32)+0.5*(g3_n-g2_n)/(l3-l2)*n31*n21*(n32*n22+n22*n32)
    g1133_n = d11_n*n11*n11*n13*n13+d22_n*n21*n21*n23*n23+d33_n*n31*n31*n33*n33+0.5*(g1_n-g2_n)/(l1-l2)*n11*n21*(n13*n23+n23*n13)+0.5*(g1_n-g3_n)/(l1-l3)*n11*n31*(n13*n33+n33*n13)+0.5*(g2_n-g1_n)/(l2-l1)*n21*n11*(n23*n13+n13*n23)+0.5*(g2_n-g3_n)/(l2-l3)*n21*n31*(n23*n33+n33*n23)+0.5*(g3_n-g1_n)/(l3-l1)*n31*n11*(n33*n13+n13*n33)+0.5*(g3_n-g2_n)/(l3-l2)*n31*n21*(n33*n23+n23*n33)
    g1112_n = d11_n*n11*n11*n11*n12+d22_n*n21*n21*n21*n22+d33_n*n31*n31*n31*n32+0.5*(g1_n-g2_n)/(l1-l2)*n11*n21*(n11*n22+n21*n12)+0.5*(g1_n-g3_n)/(l1-l3)*n11*n31*(n11*n32+n31*n12)+0.5*(g2_n-g1_n)/(l2-l1)*n21*n11*(n21*n12+n11*n22)+0.5*(g2_n-g3_n)/(l2-l3)*n21*n31*(n21*n32+n31*n22)+0.5*(g3_n-g1_n)/(l3-l1)*n31*n11*(n31*n12+n11*n32)+0.5*(g3_n-g2_n)/(l3-l2)*n31*n21*(n31*n22+n21*n32)
    g1123_n = d11_n*n11*n11*n12*n13+d22_n*n21*n21*n22*n23+d33_n*n31*n31*n32*n33+0.5*(g1_n-g2_n)/(l1-l2)*n11*n21*(n12*n23+n22*n13)+0.5*(g1_n-g3_n)/(l1-l3)*n11*n31*(n12*n33+n32*n13)+0.5*(g2_n-g1_n)/(l2-l1)*n21*n11*(n22*n13+n12*n23)+0.5*(g2_n-g3_n)/(l2-l3)*n21*n31*(n22*n33+n32*n23)+0.5*(g3_n-g1_n)/(l3-l1)*n31*n11*(n32*n13+n12*n33)+0.5*(g3_n-g2_n)/(l3-l2)*n31*n21*(n32*n23+n22*n33)
    g1113_n = d11_n*n11*n11*n11*n13+d22_n*n21*n21*n21*n23+d33_n*n31*n31*n31*n33+0.5*(g1_n-g2_n)/(l1-l2)*n11*n21*(n11*n23+n21*n13)+0.5*(g1_n-g3_n)/(l1-l3)*n11*n31*(n11*n33+n31*n13)+0.5*(g2_n-g1_n)/(l2-l1)*n21*n11*(n21*n13+n11*n23)+0.5*(g2_n-g3_n)/(l2-l3)*n21*n31*(n21*n33+n31*n23)+0.5*(g3_n-g1_n)/(l3-l1)*n31*n11*(n31*n13+n11*n33)+0.5*(g3_n-g2_n)/(l3-l2)*n31*n21*(n31*n23+n21*n33)
    g2222_n = d11_n*n12*n12*n12*n12+d22_n*n22*n22*n22*n22+d33_n*n32*n32*n32*n32+0.5*(g1_n-g2_n)/(l1-l2)*n12*n22*(n12*n22+n22*n12)+0.5*(g1_n-g3_n)/(l1-l3)*n12*n32*(n12*n32+n32*n12)+0.5*(g2_n-g1_n)/(l2-l1)*n22*n12*(n22*n12+n12*n22)+0.5*(g2_n-g3_n)/(l2-l3)*n22*n32*(n22*n32+n32*n22)+0.5*(g3_n-g1_n)/(l3-l1)*n32*n12*(n32*n12+n12*n32)+0.5*(g3_n-g2_n)/(l3-l2)*n32*n22*(n32*n22+n22*n32)
    g2233_n = d11_n*n12*n12*n13*n13+d22_n*n22*n22*n23*n23+d33_n*n32*n32*n33*n33+0.5*(g1_n-g2_n)/(l1-l2)*n12*n22*(n13*n23+n23*n13)+0.5*(g1_n-g3_n)/(l1-l3)*n12*n32*(n13*n33+n33*n13)+0.5*(g2_n-g1_n)/(l2-l1)*n22*n12*(n23*n13+n13*n23)+0.5*(g2_n-g3_n)/(l2-l3)*n22*n32*(n23*n33+n33*n23)+0.5*(g3_n-g1_n)/(l3-l1)*n32*n12*(n33*n13+n13*n33)+0.5*(g3_n-g2_n)/(l3-l2)*n32*n22*(n33*n23+n23*n33)
    g2212_n = d11_n*n12*n12*n11*n12+d22_n*n22*n22*n21*n22+d33_n*n32*n32*n31*n32+0.5*(g1_n-g2_n)/(l1-l2)*n12*n22*(n11*n22+n21*n12)+0.5*(g1_n-g3_n)/(l1-l3)*n12*n32*(n11*n32+n31*n12)+0.5*(g2_n-g1_n)/(l2-l1)*n22*n12*(n21*n12+n11*n22)+0.5*(g2_n-g3_n)/(l2-l3)*n22*n32*(n21*n32+n31*n22)+0.5*(g3_n-g1_n)/(l3-l1)*n32*n12*(n31*n12+n11*n32)+0.5*(g3_n-g2_n)/(l3-l2)*n32*n22*(n31*n22+n21*n32)
    g2223_n = d11_n*n12*n12*n12*n13+d22_n*n22*n22*n22*n23+d33_n*n32*n32*n32*n33+0.5*(g1_n-g2_n)/(l1-l2)*n12*n22*(n12*n23+n22*n13)+0.5*(g1_n-g3_n)/(l1-l3)*n12*n32*(n12*n33+n32*n13)+0.5*(g2_n-g1_n)/(l2-l1)*n22*n12*(n22*n13+n12*n23)+0.5*(g2_n-g3_n)/(l2-l3)*n22*n32*(n22*n33+n32*n23)+0.5*(g3_n-g1_n)/(l3-l1)*n32*n12*(n32*n13+n12*n33)+0.5*(g3_n-g2_n)/(l3-l2)*n32*n22*(n32*n23+n22*n33)
    g2213_n = d11_n*n12*n12*n11*n13+d22_n*n22*n22*n21*n23+d33_n*n32*n32*n31*n33+0.5*(g1_n-g2_n)/(l1-l2)*n12*n22*(n11*n23+n21*n13)+0.5*(g1_n-g3_n)/(l1-l3)*n12*n32*(n11*n33+n31*n13)+0.5*(g2_n-g1_n)/(l2-l1)*n22*n12*(n21*n13+n11*n23)+0.5*(g2_n-g3_n)/(l2-l3)*n22*n32*(n21*n33+n31*n23)+0.5*(g3_n-g1_n)/(l3-l1)*n32*n12*(n31*n13+n11*n33)+0.5*(g3_n-g2_n)/(l3-l2)*n32*n22*(n31*n23+n21*n33)
    g3333_n = d11_n*n13*n13*n13*n13+d22_n*n23*n23*n23*n23+d33_n*n33*n33*n33*n33+0.5*(g1_n-g2_n)/(l1-l2)*n13*n23*(n13*n23+n23*n13)+0.5*(g1_n-g3_n)/(l1-l3)*n13*n33*(n13*n33+n33*n13)+0.5*(g2_n-g1_n)/(l2-l1)*n23*n13*(n23*n13+n13*n23)+0.5*(g2_n-g3_n)/(l2-l3)*n23*n33*(n23*n33+n33*n23)+0.5*(g3_n-g1_n)/(l3-l1)*n33*n13*(n33*n13+n13*n33)+0.5*(g3_n-g2_n)/(l3-l2)*n33*n23*(n33*n23+n23*n33)
    g3312_n = d11_n*n13*n13*n11*n12+d22_n*n23*n23*n21*n22+d33_n*n33*n33*n31*n32+0.5*(g1_n-g2_n)/(l1-l2)*n13*n23*(n11*n22+n21*n12)+0.5*(g1_n-g3_n)/(l1-l3)*n13*n33*(n11*n32+n31*n12)+0.5*(g2_n-g1_n)/(l2-l1)*n23*n13*(n21*n12+n11*n22)+0.5*(g2_n-g3_n)/(l2-l3)*n23*n33*(n21*n32+n31*n22)+0.5*(g3_n-g1_n)/(l3-l1)*n33*n13*(n31*n12+n11*n32)+0.5*(g3_n-g2_n)/(l3-l2)*n33*n23*(n31*n22+n21*n32)
    g3323_n = d11_n*n13*n13*n12*n13+d22_n*n23*n23*n22*n23+d33_n*n33*n33*n32*n33+0.5*(g1_n-g2_n)/(l1-l2)*n13*n23*(n12*n23+n22*n13)+0.5*(g1_n-g3_n)/(l1-l3)*n13*n33*(n12*n33+n32*n13)+0.5*(g2_n-g1_n)/(l2-l1)*n23*n13*(n22*n13+n12*n23)+0.5*(g2_n-g3_n)/(l2-l3)*n23*n33*(n22*n33+n32*n23)+0.5*(g3_n-g1_n)/(l3-l1)*n33*n13*(n32*n13+n12*n33)+0.5*(g3_n-g2_n)/(l3-l2)*n33*n23*(n32*n23+n22*n33)
    g3313_n = d11_n*n13*n13*n11*n13+d22_n*n23*n23*n21*n23+d33_n*n33*n33*n31*n33+0.5*(g1_n-g2_n)/(l1-l2)*n13*n23*(n11*n23+n21*n13)+0.5*(g1_n-g3_n)/(l1-l3)*n13*n33*(n11*n33+n31*n13)+0.5*(g2_n-g1_n)/(l2-l1)*n23*n13*(n21*n13+n11*n23)+0.5*(g2_n-g3_n)/(l2-l3)*n23*n33*(n21*n33+n31*n23)+0.5*(g3_n-g1_n)/(l3-l1)*n33*n13*(n31*n13+n11*n33)+0.5*(g3_n-g2_n)/(l3-l2)*n33*n23*(n31*n23+n21*n33)
    g1212_n = d11_n*n11*n12*n11*n12+d22_n*n21*n22*n21*n22+d33_n*n31*n32*n31*n32+0.5*(g1_n-g2_n)/(l1-l2)*n11*n22*(n11*n22+n21*n12)+0.5*(g1_n-g3_n)/(l1-l3)*n11*n32*(n11*n32+n31*n12)+0.5*(g2_n-g1_n)/(l2-l1)*n21*n12*(n21*n12+n11*n22)+0.5*(g2_n-g3_n)/(l2-l3)*n21*n32*(n21*n32+n31*n22)+0.5*(g3_n-g1_n)/(l3-l1)*n31*n12*(n31*n12+n11*n32)+0.5*(g3_n-g2_n)/(l3-l2)*n31*n22*(n31*n22+n21*n32)
    g1223_n = d11_n*n11*n12*n12*n13+d22_n*n21*n22*n22*n23+d33_n*n31*n32*n32*n33+0.5*(g1_n-g2_n)/(l1-l2)*n11*n22*(n12*n23+n22*n13)+0.5*(g1_n-g3_n)/(l1-l3)*n11*n32*(n12*n33+n32*n13)+0.5*(g2_n-g1_n)/(l2-l1)*n21*n12*(n22*n13+n12*n23)+0.5*(g2_n-g3_n)/(l2-l3)*n21*n32*(n22*n33+n32*n23)+0.5*(g3_n-g1_n)/(l3-l1)*n31*n12*(n32*n13+n12*n33)+0.5*(g3_n-g2_n)/(l3-l2)*n31*n22*(n32*n23+n22*n33)
    g1213_n = d11_n*n11*n12*n11*n13+d22_n*n21*n22*n21*n23+d33_n*n31*n32*n31*n33+0.5*(g1_n-g2_n)/(l1-l2)*n11*n22*(n11*n23+n21*n13)+0.5*(g1_n-g3_n)/(l1-l3)*n11*n32*(n11*n33+n31*n13)+0.5*(g2_n-g1_n)/(l2-l1)*n21*n12*(n21*n13+n11*n23)+0.5*(g2_n-g3_n)/(l2-l3)*n21*n32*(n21*n33+n31*n23)+0.5*(g3_n-g1_n)/(l3-l1)*n31*n12*(n31*n13+n11*n33)+0.5*(g3_n-g2_n)/(l3-l2)*n31*n22*(n31*n23+n21*n33)
    g2323_n = d11_n*n12*n13*n12*n13+d22_n*n22*n23*n22*n23+d33_n*n32*n33*n32*n33+0.5*(g1_n-g2_n)/(l1-l2)*n12*n23*(n12*n23+n22*n13)+0.5*(g1_n-g3_n)/(l1-l3)*n12*n33*(n12*n33+n32*n13)+0.5*(g2_n-g1_n)/(l2-l1)*n22*n13*(n22*n13+n12*n23)+0.5*(g2_n-g3_n)/(l2-l3)*n22*n33*(n22*n33+n32*n23)+0.5*(g3_n-g1_n)/(l3-l1)*n32*n13*(n32*n13+n12*n33)+0.5*(g3_n-g2_n)/(l3-l2)*n32*n23*(n32*n23+n22*n33)
    g2313_n = d11_n*n12*n13*n11*n13+d22_n*n22*n23*n21*n23+d33_n*n32*n33*n31*n33+0.5*(g1_n-g2_n)/(l1-l2)*n12*n23*(n11*n23+n21*n13)+0.5*(g1_n-g3_n)/(l1-l3)*n12*n33*(n11*n33+n31*n13)+0.5*(g2_n-g1_n)/(l2-l1)*n22*n13*(n21*n13+n11*n23)+0.5*(g2_n-g3_n)/(l2-l3)*n22*n33*(n21*n33+n31*n23)+0.5*(g3_n-g1_n)/(l3-l1)*n32*n13*(n31*n13+n11*n33)+0.5*(g3_n-g2_n)/(l3-l2)*n32*n23*(n31*n23+n21*n33)
    g1313_n = d11_n*n11*n13*n11*n13+d22_n*n21*n23*n21*n23+d33_n*n31*n33*n31*n33+0.5*(g1_n-g2_n)/(l1-l2)*n11*n23*(n11*n23+n21*n13)+0.5*(g1_n-g3_n)/(l1-l3)*n11*n33*(n11*n33+n31*n13)+0.5*(g2_n-g1_n)/(l2-l1)*n21*n13*(n21*n13+n11*n23)+0.5*(g2_n-g3_n)/(l2-l3)*n21*n33*(n21*n33+n31*n23)+0.5*(g3_n-g1_n)/(l3-l1)*n31*n13*(n31*n13+n11*n33)+0.5*(g3_n-g2_n)/(l3-l2)*n31*n23*(n31*n23+n21*n33)
    cc = (1-k)*(1-u2)^2+k
    dd = if(tra1>0,(1-k)*(1-u2)^2+k,1)
    g1111 = 2*mu*(cc*g1111_p+g1111_n)+lanta*dd
    g1122 = 2*mu*(cc*g1122_p+g1122_n)+lanta*dd
    g1133 = 2*mu*(cc*g1133_p+g1133_n)+lanta*dd
    g1112 = 2*mu*(cc*g1112_p+g1112_n)
    g1123 = 2*mu*(cc*g1123_p+g1123_n)
    g1113 = 2*mu*(cc*g1113_p+g1113_n)
    g2222 = 2*mu*(cc*g2222_p+g2222_n)+lanta*dd
    g2233 = 2*mu*(cc*g2233_p+g2233_n)+lanta*dd
    g2212 = 2*mu*(cc*g2212_p+g2212_n)
    g2223 = 2*mu*(cc*g2223_p+g2223_n)
    g2213 = 2*mu*(cc*g2213_p+g2213_n)
    g3333 = 2*mu*(cc*g3333_p+g3333_n)+lanta*dd
    g3312 = 2*mu*(cc*g3312_p+g3312_n)
    g3323 = 2*mu*(cc*g3323_p+g3323_n)
    g3313 = 2*mu*(cc*g3313_p+g3313_n)
    g1212 = 2*mu*(cc*g1212_p+g1212_n)
    g1223 = 2*mu*(cc*g1223_p+g1223_n)
    g1213 = 2*mu*(cc*g1213_p+g1213_n)
    g2323 = 2*mu*(cc*g2323_p+g2323_n)
    g2313 = 2*mu*(cc*g2313_p+g2313_n)
    g1313 = 2*mu*(cc*g1313_p+g1313_n)
    res1 = intop1(solid.sx)
    res2 = intop1(solid.sy)
    res3 = intop1(solid.sxy)
  var2 "上边界" on boundaries 4
    a1 = 6.393
    b1 = 0.07376
    c1 = 4.909
    a2 = 1.149
    b2 = 0.1597
    c2 = 4.628
    a3 = 0.05653
    b3 = 0.5597
    c3 = -1.854
    a4 = 0.2385
    b4 = 1.137
    c4 = -6.273
    a5 = 0.1732
    b5 = 1.612
    c5 = -0.1327
    a6 = 0.2581
    b6 = 0.6656
    c6 = 6.305
    a7 = 0.1117
    b7 = 2.105
    c7 = -1.065
    a8 = 0.05969
    b8 = 2.599
    c8 = -2.065
    x1 = y/1[m]
    prait = ( a1*sin(b1*x1+c1)+a2*sin(b2*x1+c2) +a3*sin(b3*x1+c3) +a4*sin(b4*x1+c4) +a5*sin(b5*x1+c5) +a6*sin(b6*x1+c6) +a7*sin(b7*x1+c7) +a8*sin(b8*x1+c8) )[MPa]
  var3 "下边界" on boundaries 6
    a1 = 6.393
    b1 = 0.07376
    c1 = 4.909
    a2 = 1.149
    b2 = 0.1597
    c2 = 4.628
    a3 = 0.05653
    b3 = 0.5597
    c3 = -1.854
    a4 = 0.2385
    b4 = 1.137
    c4 = -6.273
    a5 = 0.1732
    b5 = 1.612
    c5 = -0.1327
    a6 = 0.2581
    b6 = 0.6656
    c6 = 6.305
    a7 = 0.1117
    b7 = 2.105
    c7 = -1.065
    a8 = 0.05969
    b8 = 2.599
    c8 = -2.065
    x1 = y/1[m]
    prait1 = ( a1*sin(b1*x1+c1)+a2*sin(b2*x1+c2) +a3*sin(b3*x1+c3) +a4*sin(b4*x1+c4) +a5*sin(b5*x1+c5) +a6*sin(b6*x1+c6) +a7*sin(b7*x1+c7) +a8*sin(b8*x1+c8) )[MPa]
  var4 "变量 4"
    e1_n = if(solid.ep1<0,solid.ep1,0)
    e2_n = if(solid.ep2<0,solid.ep2,0)
    e3_n = if(solid.ep3<0,solid.ep3,0)
    fai1 = mu*(e2_n-e1_n)/cos(faixx)+lanta*tra1*tan(faixx)+2*mu*(e2_n+e1_n)*tan(faixx)-Cc
    fai2 = mu*(e3_n-e2_n)/cos(faixx)+lanta*tra1*tan(faixx)+2*mu*(e3_n+e2_n)*tan(faixx)-Cc
    fai1_p = if(fai1>0,fai1,0)
    fai2_p = if(fai2>0,fai2,0)
    fai_p = 0*0.5/mu*(fai1_p^2+fai2_p^2)+fai_p11*1
    e1_p = if(solid.ep1>0,solid.ep1,0)
    e2_p = if(solid.ep2>0,solid.ep2,0)
    e3_p = if(solid.ep3>0,solid.ep3,0)
    tra1 = solid.ep1+solid.ep2+solid.ep3
    tra1_p = if(tra1>0,tra1,0)
    fai_p11 = lanta*tra1_p^2/2+mu*(e1_p^2+e2_p^2+e3_p^2)

Geometry
  geom1 "几何 1" (2D, length unit mm)
    r1: Rectangle "矩形 1" | size = {70, 100}; base = center
    r2: Rectangle "矩形 2" | size = {40, 1}; base = center; pos = {0, 50}; rot = 90
    r3: Rectangle "矩形 3" (disabled) | size = {40, 80}; base = center; pos = {0, 50}
    dif1: Difference "差集 1" | input = r1, r2, r3; input2 = r2
    pt1: Point "点 1" (disabled) | p = {3, 0.5}
    pt2: Point "点 2" (disabled) | p = {3, -0.5}
    fin: Finalize "形成联合体"

Physics
  solid: SolidMechanics "固体力学" on all domains
    dependent variable u = {u, v, w}
    lemm1: LinearElasticModel "线弹性材料 1" (default)
      SolidModel = Anisotropic
      D_mat = userdef
      D = {g1111, g1122, g1133, g1112, g1123, g1113, g1122, g2222, g2233, g2212, g2223, g2213, g1133, g2233, g3333, g3312, g3323, g3313, g1112, g2212, g3312, g1212, g1223, g1213, g1123, g2223, g3323, g1223, g2323, g2313, g1113, g2213, g3313, g1213, g2313, g1313}
      rho_mat = userdef
      rho = 2450
    free1: Free "自由 1" (default)
    init1: init "初始值 1" (default)
    bndl1: BoundaryLoad "上边界" on boundaries 4 | FperArea = {-prait*0.5, 0, 0}
    bndl2: BoundaryLoad "下边界" on boundaries 6 | FperArea = {prait1*0.5, 0, 0}
    fix1: Fixed "固定约束 1" (disabled) on no boundaries
    bndl3: BoundaryLoad "边界载荷 3" (disabled) on boundaries 1 | FperArea = {1[MPa], 0, 0}
    bndl4: BoundaryLoad "边界载荷 4" (disabled) on boundaries 8 | FperArea = {-1[MPa], 0, 0}
    bndl5: BoundaryLoad "边界载荷 5" (disabled) on boundaries 2 | FperArea = {0, 1[MPa], 0}
  c: CoefficientFormPDE "系数形式偏微分方程" on all domains
    dependent variable u2
    Units.CustomSourceTermUnit = 1
    cfeq1: CoefficientFormPDE "系数形式偏微分方程 1" (default)
      c = {l0^2, 0, 0, l0^2}
      a = 2*l0*H*(1-k)/Gc+1
      f = 2*H*l0*(1-k)/Gc
      da = l0/Gc*nxdc
    zflx1: ZeroFluxBoundary "零通量 1" (default)
    init1: init "初始值 1" (default)
  dode: DomainODE "域常微分和微分代数方程" on all domains
    dependent variable H
    Units.DependentVariableQuantity = none
    Units.CustomDependentVariableUnit = J/m^3
    Units.CustomSourceTermUnit = J/m^3
    dode1: DistributedODE "分布式常微分方程 1" (default) | f = H-nojac(if(fai_p>H,fai_p,H)); da = 0
    init1: init "初始值 1" (default)

Mesh
  mesh1 "网格 1"
    size: MeshSizeDefault "大小" | hmax = 10; hmin = 0.2; hauto = 6
    fq1: FreeQuad "自由四边形网格 1" on no domains
      size1: Size "大小 1" on all domains | hmax = 0.1; custom = on

Studies
  std1 "研究 1"
    time: Transient "瞬态" | tunit = µs; tlist = range(0,0.1,50); usertol = on

Solver configurations
  sol1 "解 1" (study std1)
    v1: Variables "因变量 1"
      comp1_u: Field "位移场 (comp1.u)" | scalemethod = manual; scaleval = 1e-2*0.107703296143
    t1: Time "瞬态求解器 1" | tunit = µs; tlist = range(0,0.1,50); rtol = 0.001; timemethod = genalpha; tstepsgenalpha = strict
      dDef: Direct "直接"
      se1: Segregated "分离 1"
        ssDef: SegregatedStep "U" | segvar = {comp1_u2}
        ss1: SegregatedStep "H" | segvar = {comp1_H}
        ss2: SegregatedStep "分离步骤 2" | segvar = {comp1_u}
        ll1: LowerLimit "下限 1" | lowerlimit = comp1.H 0
      ps1: PreviousSolution "上一个解 1" | prevcomp = {comp1_H}

Datasets
  dset1: Solution | solution = sol1

Plots
  pg1: PlotGroup2D "dd" | data = dset1
    surf1: Surface "d" | data = dset1; expr = u2