// COMSOL Multiphysics 6.3.0.290 model "压剪不远场-起裂角验证sa1.mph"
// Static Fracture I PFM 1 11
// Outline of the model tree

Parameters
  E0 = 210[GPa]  // Lama Paramter1
  Nu = 0.3  // Lama Parameter2
  Gc = 2700[N/m]  // Critial Energy Release Rate
  k = 1e-9  // Control Numerical Sigularity
  l0 = 0.0075[mm]/2
  hmax = l0  // maximum element size
  mu = E0/(2*(1+Nu))  // Lama Paramter1
  lanta = 121.154[GPa]  // Lama Paramter2
  B = 1000/(1-k)
  faixx = 15[deg]  // 岩石内摩擦角度
  Cc = 100[kPa]  // 岩石粘聚力
  GG = E0/(2*(1+Nu))  // 岩石剪切模量,lame常数1
  n1 = 0[deg]
  nn = 37[deg]
  n2 = sin(nn)
  n3 = cos(nn)

Variables
  var1 "Variables 1" on domains 1
    n1 = if(tra1>0,(1-k)*(1-u)^2+k,1)
    m1 = if(solid.ep1>0,(1-k)*(1-u)^2+k,1)
    n11 = solid.ep1X
    n12 = solid.ep1Y
    n13 = solid.ep1Z
    n21 = solid.ep2X
    n22 = solid.ep2Y
    n23 = solid.ep2Z
    n31 = solid.ep3X
    n32 = solid.ep3Y
    n33 = solid.ep3Z
    d11_p = if(solid.ep1>0,1,0)
    d22_p = if(solid.ep2>0,1,0)
    d33_p = if(solid.ep3>0,1,0)
    d11_n = if(solid.ep1<=0,1,0)
    d22_n = if(solid.ep2<=0,1,0)
    d33_n = if(solid.ep3<=0,1,0)
    l1 = if(solid.ep1>solid.ep2,solid.ep1,solid.ep1+1e-9)
    l2 = solid.ep2
    l3 = if(solid.ep3<solid.ep2,solid.ep3,solid.ep3-1e-9)
    g1_p = if(solid.ep1>solid.ep2,d11_p*solid.ep1,d11_p*solid.ep1+1e-9)
    g2_p = d22_p*solid.ep2
    g3_p = if(solid.ep3<solid.ep2,d33_p*solid.ep3,d33_p*solid.ep3-1e-9)
    g1_n = if(solid.ep1>solid.ep2,d11_n*solid.ep1,d11_n*solid.ep1+1e-9)
    g2_n = d22_n*solid.ep2
    g3_n = if(solid.ep3<solid.ep2,d33_n*solid.ep3,d33_n*solid.ep3-1e-9)
    g1111_p = d11_p*n11*n11*n11*n11+d22_p*n21*n21*n21*n21+d33_p*n31*n31*n31*n31+0.5*(g1_p-g2_p)/(l1-l2)*n11*n21*(n11*n21+n21*n11)+0.5*(g1_p-g3_p)/(l1-l3)*n11*n31*(n11*n31+n31*n11)+0.5*(g2_p-g1_p)/(l2-l1)*n21*n11*(n21*n11+n11*n21)+0.5*(g2_p-g3_p)/(l2-l3)*n21*n31*(n21*n31+n31*n21)+0.5*(g3_p-g1_p)/(l3-l1)*n31*n11*(n31*n11+n11*n31)+0.5*(g3_p-g2_p)/(l3-l2)*n31*n21*(n31*n21+n21*n31)
    g1122_p = d11_p*n11*n11*n12*n12+d22_p*n21*n21*n22*n22+d33_p*n31*n31*n32*n32+0.5*(g1_p-g2_p)/(l1-l2)*n11*n21*(n12*n22+n22*n12)+0.5*(g1_p-g3_p)/(l1-l3)*n11*n31*(n12*n32+n32*n12)+0.5*(g2_p-g1_p)/(l2-l1)*n21*n11*(n22*n12+n12*n22)+0.5*(g2_p-g3_p)/(l2-l3)*n21*n31*(n22*n32+n32*n22)+0.5*(g3_p-g1_p)/(l3-l1)*n31*n11*(n32*n12+n12*n32)+0.5*(g3_p-g2_p)/(l3-l2)*n31*n21*(n32*n22+n22*n32)
    g1133_p = d11_p*n11*n11*n13*n13+d22_p*n21*n21*n23*n23+d33_p*n31*n31*n33*n33+0.5*(g1_p-g2_p)/(l1-l2)*n11*n21*(n13*n23+n23*n13)+0.5*(g1_p-g3_p)/(l1-l3)*n11*n31*(n13*n33+n33*n13)+0.5*(g2_p-g1_p)/(l2-l1)*n21*n11*(n23*n13+n13*n23)+0.5*(g2_p-g3_p)/(l2-l3)*n21*n31*(n23*n33+n33*n23)+0.5*(g3_p-g1_p)/(l3-l1)*n31*n11*(n33*n13+n13*n33)+0.5*(g3_p-g2_p)/(l3-l2)*n31*n21*(n33*n23+n23*n33)
    g1112_p = d11_p*n11*n11*n11*n12+d22_p*n21*n21*n21*n22+d33_p*n31*n31*n31*n32+0.5*(g1_p-g2_p)/(l1-l2)*n11*n21*(n11*n22+n21*n12)+0.5*(g1_p-g3_p)/(l1-l3)*n11*n31*(n11*n32+n31*n12)+0.5*(g2_p-g1_p)/(l2-l1)*n21*n11*(n21*n12+n11*n22)+0.5*(g2_p-g3_p)/(l2-l3)*n21*n31*(n21*n32+n31*n22)+0.5*(g3_p-g1_p)/(l3-l1)*n31*n11*(n31*n12+n11*n32)+0.5*(g3_p-g2_p)/(l3-l2)*n31*n21*(n31*n22+n21*n32)
    g1123_p = d11_p*n11*n11*n12*n13+d22_p*n21*n21*n22*n23+d33_p*n31*n31*n32*n33+0.5*(g1_p-g2_p)/(l1-l2)*n11*n21*(n12*n23+n22*n13)+0.5*(g1_p-g3_p)/(l1-l3)*n11*n31*(n12*n33+n32*n13)+0.5*(g2_p-g1_p)/(l2-l1)*n21*n11*(n22*n13+n12*n23)+0.5*(g2_p-g3_p)/(l2-l3)*n21*n31*(n22*n33+n32*n23)+0.5*(g3_p-g1_p)/(l3-l1)*n31*n11*(n32*n13+n12*n33)+0.5*(g3_p-g2_p)/(l3-l2)*n31*n21*(n32*n23+n22*n33)
    g1113_p = d11_p*n11*n11*n11*n13+d22_p*n21*n21*n21*n23+d33_p*n31*n31*n31*n33+0.5*(g1_p-g2_p)/(l1-l2)*n11*n21*(n11*n23+n21*n13)+0.5*(g1_p-g3_p)/(l1-l3)*n11*n31*(n11*n33+n31*n13)+0.5*(g2_p-g1_p)/(l2-l1)*n21*n11*(n21*n13+n11*n23)+0.5*(g2_p-g3_p)/(l2-l3)*n21*n31*(n21*n33+n31*n23)+0.5*(g3_p-g1_p)/(l3-l1)*n31*n11*(n31*n13+n11*n33)+0.5*(g3_p-g2_p)/(l3-l2)*n31*n21*(n31*n23+n21*n33)
    g2222_p = d11_p*n12*n12*n12*n12+d22_p*n22*n22*n22*n22+d33_p*n32*n32*n32*n32+0.5*(g1_p-g2_p)/(l1-l2)*n12*n22*(n12*n22+n22*n12)+0.5*(g1_p-g3_p)/(l1-l3)*n12*n32*(n12*n32+n32*n12)+0.5*(g2_p-g1_p)/(l2-l1)*n22*n12*(n22*n12+n12*n22)+0.5*(g2_p-g3_p)/(l2-l3)*n22*n32*(n22*n32+n32*n22)+0.5*(g3_p-g1_p)/(l3-l1)*n32*n12*(n32*n12+n12*n32)+0.5*(g3_p-g2_p)/(l3-l2)*n32*n22*(n32*n22+n22*n32)
    g2233_p = d11_p*n12*n12*n13*n13+d22_p*n22*n22*n23*n23+d33_p*n32*n32*n33*n33+0.5*(g1_p-g2_p)/(l1-l2)*n12*n22*(n13*n23+n23*n13)+0.5*(g1_p-g3_p)/(l1-l3)*n12*n32*(n13*n33+n33*n13)+0.5*(g2_p-g1_p)/(l2-l1)*n22*n12*(n23*n13+n13*n23)+0.5*(g2_p-g3_p)/(l2-l3)*n22*n32*(n23*n33+n33*n23)+0.5*(g3_p-g1_p)/(l3-l1)*n32*n12*(n33*n13+n13*n33)+0.5*(g3_p-g2_p)/(l3-l2)*n32*n22*(n33*n23+n23*n33)
    g2212_p = d11_p*n12*n12*n11*n12+d22_p*n22*n22*n21*n22+d33_p*n32*n32*n31*n32+0.5*(g1_p-g2_p)/(l1-l2)*n12*n22*(n11*n22+n21*n12)+0.5*(g1_p-g3_p)/(l1-l3)*n12*n32*(n11*n32+n31*n12)+0.5*(g2_p-g1_p)/(l2-l1)*n22*n12*(n21*n12+n11*n22)+0.5*(g2_p-g3_p)/(l2-l3)*n22*n32*(n21*n32+n31*n22)+0.5*(g3_p-g1_p)/(l3-l1)*n32*n12*(n31*n12+n11*n32)+0.5*(g3_p-g2_p)/(l3-l2)*n32*n22*(n31*n22+n21*n32)
    g2223_p = d11_p*n12*n12*n12*n13+d22_p*n22*n22*n22*n23+d33_p*n32*n32*n32*n33+0.5*(g1_p-g2_p)/(l1-l2)*n12*n22*(n12*n23+n22*n13)+0.5*(g1_p-g3_p)/(l1-l3)*n12*n32*(n12*n33+n32*n13)+0.5*(g2_p-g1_p)/(l2-l1)*n22*n12*(n22*n13+n12*n23)+0.5*(g2_p-g3_p)/(l2-l3)*n22*n32*(n22*n33+n32*n23)+0.5*(g3_p-g1_p)/(l3-l1)*n32*n12*(n32*n13+n12*n33)+0.5*(g3_p-g2_p)/(l3-l2)*n32*n22*(n32*n23+n22*n33)
    g2213_p = d11_p*n12*n12*n11*n13+d22_p*n22*n22*n21*n23+d33_p*n32*n32*n31*n33+0.5*(g1_p-g2_p)/(l1-l2)*n12*n22*(n11*n23+n21*n13)+0.5*(g1_p-g3_p)/(l1-l3)*n12*n32*(n11*n33+n31*n13)+0.5*(g2_p-g1_p)/(l2-l1)*n22*n12*(n21*n13+n11*n23)+0.5*(g2_p-g3_p)/(l2-l3)*n22*n32*(n21*n33+n31*n23)+0.5*(g3_p-g1_p)/(l3-l1)*n32*n12*(n31*n13+n11*n33)+0.5*(g3_p-g2_p)/(l3-l2)*n32*n22*(n31*n23+n21*n33)
    g3333_p = d11_p*n13*n13*n13*n13+d22_p*n23*n23*n23*n23+d33_p*n33*n33*n33*n33+0.5*(g1_p-g2_p)/(l1-l2)*n13*n23*(n13*n23+n23*n13)+0.5*(g1_p-g3_p)/(l1-l3)*n13*n33*(n13*n33+n33*n13)+0.5*(g2_p-g1_p)/(l2-l1)*n23*n13*(n23*n13+n13*n23)+0.5*(g2_p-g3_p)/(l2-l3)*n23*n33*(n23*n33+n33*n23)+0.5*(g3_p-g1_p)/(l3-l1)*n33*n13*(n33*n13+n13*n33)+0.5*(g3_p-g2_p)/(l3-l2)*n33*n23*(n33*n23+n23*n33)
    g3312_p = d11_p*n13*n13*n11*n12+d22_p*n23*n23*n21*n22+d33_p*n33*n33*n31*n32+0.5*(g1_p-g2_p)/(l1-l2)*n13*n23*(n11*n22+n21*n12)+0.5*(g1_p-g3_p)/(l1-l3)*n13*n33*(n11*n32+n31*n12)+0.5*(g2_p-g1_p)/(l2-l1)*n23*n13*(n21*n12+n11*n22)+0.5*(g2_p-g3_p)/(l2-l3)*n23*n33*(n21*n32+n31*n22)+0.5*(g3_p-g1_p)/(l3-l1)*n33*n13*(n31*n12+n11*n32)+0.5*(g3_p-g2_p)/(l3-l2)*n33*n23*(n31*n22+n21*n32)
    g3323_p = d11_p*n13*n13*n12*n13+d22_p*n23*n23*n22*n23+d33_p*n33*n33*n32*n33+0.5*(g1_p-g2_p)/(l1-l2)*n13*n23*(n12*n23+n22*n13)+0.5*(g1_p-g3_p)/(l1-l3)*n13*n33*(n12*n33+n32*n13)+0.5*(g2_p-g1_p)/(l2-l1)*n23*n13*(n22*n13+n12*n23)+0.5*(g2_p-g3_p)/(l2-l3)*n23*n33*(n22*n33+n32*n23)+0.5*(g3_p-g1_p)/(l3-l1)*n33*n13*(n32*n13+n12*n33)+0.5*(g3_p-g2_p)/(l3-l2)*n33*n23*(n32*n23+n22*n33)
    g3313_p = d11_p*n13*n13*n11*n13+d22_p*n23*n23*n21*n23+d33_p*n33*n33*n31*n33+0.5*(g1_p-g2_p)/(l1-l2)*n13*n23*(n11*n23+n21*n13)+0.5*(g1_p-g3_p)/(l1-l3)*n13*n33*(n11*n33+n31*n13)+0.5*(g2_p-g1_p)/(l2-l1)*n23*n13*(n21*n13+n11*n23)+0.5*(g2_p-g3_p)/(l2-l3)*n23*n33*(n21*n33+n31*n23)+0.5*(g3_p-g1_p)/(l3-l1)*n33*n13*(n31*n13+n11*n33)+0.5*(g3_p-g2_p)/(l3-l2)*n33*n23*(n31*n23+n21*n33)
    g1212_p = d11_p*n11*n12*n11*n12+d22_p*n21*n22*n21*n22+d33_p*n31*n32*n31*n32+0.5*(g1_p-g2_p)/(l1-l2)*n11*n22*(n11*n22+n21*n12)+0.5*(g1_p-g3_p)/(l1-l3)*n11*n32*(n11*n32+n31*n12)+0.5*(g2_p-g1_p)/(l2-l1)*n21*n12*(n21*n12+n11*n22)+0.5*(g2_p-g3_p)/(l2-l3)*n21*n32*(n21*n32+n31*n22)+0.5*(g3_p-g1_p)/(l3-l1)*n31*n12*(n31*n12+n11*n32)+0.5*(g3_p-g2_p)/(l3-l2)*n31*n22*(n31*n22+n21*n32)
    g1223_p = d11_p*n11*n12*n12*n13+d22_p*n21*n22*n22*n23+d33_p*n31*n32*n32*n33+0.5*(g1_p-g2_p)/(l1-l2)*n11*n22*(n12*n23+n22*n13)+0.5*(g1_p-g3_p)/(l1-l3)*n11*n32*(n12*n33+n32*n13)+0.5*(g2_p-g1_p)/(l2-l1)*n21*n12*(n22*n13+n12*n23)+0.5*(g2_p-g3_p)/(l2-l3)*n21*n32*(n22*n33+n32*n23)+0.5*(g3_p-g1_p)/(l3-l1)*n31*n12*(n32*n13+n12*n33)+0.5*(g3_p-g2_p)/(l3-l2)*n31*n22*(n32*n23+n22*n33)
    g1213_p = d11_p*n11*n12*n11*n13+d22_p*n21*n22*n21*n23+d33_p*n31*n32*n31*n33+0.5*(g1_p-g2_p)/(l1-l2)*n11*n22*(n11*n23+n21*n13)+0.5*(g1_p-g3_p)/(l1-l3)*n11*n32*(n11*n33+n31*n13)+0.5*(g2_p-g1_p)/(l2-l1)*n21*n12*(n21*n13+n11*n23)+0.5*(g2_p-g3_p)/(l2-l3)*n21*n32*(n21*n33+n31*n23)+0.5*(g3_p-g1_p)/(l3-l1)*n31*n12*(n31*n13+n11*n33)+0.5*(g3_p-g2_p)/(l3-l2)*n31*n22*(n31*n23+n21*n33)
    g2323_p = d11_p*n12*n13*n12*n13+d22_p*n22*n23*n22*n23+d33_p*n32*n33*n32*n33+0.5*(g1_p-g2_p)/(l1-l2)*n12*n23*(n12*n23+n22*n13)+0.5*(g1_p-g3_p)/(l1-l3)*n12*n33*(n12*n33+n32*n13)+0.5*(g2_p-g1_p)/(l2-l1)*n22*n13*(n22*n13+n12*n23)+0.5*(g2_p-g3_p)/(l2-l3)*n22*n33*(n22*n33+n32*n23)+0.5*(g3_p-g1_p)/(l3-l1)*n32*n13*(n32*n13+n12*n33)+0.5*(g3_p-g2_p)/(l3-l2)*n32*n23*(n32*n23+n22*n33)
    g2313_p = d11_p*n12*n13*n11*n13+d22_p*n22*n23*n21*n23+d33_p*n32*n33*n31*n33+0.5*(g1_p-g2_p)/(l1-l2)*n12*n23*(n11*n23+n21*n13)+0.5*(g1_p-g3_p)/(l1-l3)*n12*n33*(n11*n33+n31*n13)+0.5*(g2_p-g1_p)/(l2-l1)*n22*n13*(n21*n13+n11*n23)+0.5*(g2_p-g3_p)/(l2-l3)*n22*n33*(n21*n33+n31*n23)+0.5*(g3_p-g1_p)/(l3-l1)*n32*n13*(n31*n13+n11*n33)+0.5*(g3_p-g2_p)/(l3-l2)*n32*n23*(n31*n23+n21*n33)
    g1313_p = d11_p*n11*n13*n11*n13+d22_p*n21*n23*n21*n23+d33_p*n31*n33*n31*n33+0.5*(g1_p-g2_p)/(l1-l2)*n11*n23*(n11*n23+n21*n13)+0.5*(g1_p-g3_p)/(l1-l3)*n11*n33*(n11*n33+n31*n13)+0.5*(g2_p-g1_p)/(l2-l1)*n21*n13*(n21*n13+n11*n23)+0.5*(g2_p-g3_p)/(l2-l3)*n21*n33*(n21*n33+n31*n23)+0.5*(g3_p-g1_p)/(l3-l1)*n31*n13*(n31*n13+n11*n33)+0.5*(g3_p-g2_p)/(l3-l2)*n31*n23*(n31*n23+n21*n33)
    g1111_n = d11_n*n11*n11*n11*n11+d22_n*n21*n21*n21*n21+d33_n*n31*n31*n31*n31+0.5*(g1_n-g2_n)/(l1-l2)*n11*n21*(n11*n21+n21*n11)+0.5*(g1_n-g3_n)/(l1-l3)*n11*n31*(n11*n31+n31*n11)+0.5*(g2_n-g1_n)/(l2-l1)*n21*n11*(n21*n11+n11*n21)+0.5*(g2_n-g3_n)/(l2-l3)*n21*n31*(n21*n31+n31*n21)+0.5*(g3_n-g1_n)/(l3-l1)*n31*n11*(n31*n11+n11*n31)+0.5*(g3_n-g2_n)/(l3-l2)*n31*n21*(n31*n21+n21*n31)
    g1122_n = d11_n*n11*n11*n12*n12+d22_n*n21*n21*n22*n22+d33_n*n31*n31*n32*n32+0.5*(g1_n-g2_n)/(l1-l2)*n11*n21*(n12*n22+n22*n12)+0.5*(g1_n-g3_n)/(l1-l3)*n11*n31*(n12*n32+n32*n12)+0.5*(g2_n-g1_n)/(l2-l1)*n21*n11*(n22*n12+n12*n22)+0.5*(g2_n-g3_n)/(l2-l3)*n21*n31*(n22*n32+n32*n22)+0.5*(g3_n-g1_n)/(l3-l1)*n31*n11*(n32*n12+n12*n32)+0.5*(g3_n-g2_n)/(l3-l2)*n31*n21*(n32*n22+n22*n32)
    g1133_n = d11_n*n11*n11*n13*n13+d22_n*n21*n21*n23*n23+d33_n*n31*n31*n33*n33+0.5*(g1_n-g2_n)/(l1-l2)*n11*n21*(n13*n23+n23*n13)+0.5*(g1_n-g3_n)/(l1-l3)*n11*n31*(n13*n33+n33*n13)+0.5*(g2_n-g1_n)/(l2-l1)*n21*n11*(n23*n13+n13*n23)+0.5*(g2_n-g3_n)/(l2-l3)*n21*n31*(n23*n33+n33*n23)+0.5*(g3_n-g1_n)/(l3-l1)*n31*n11*(n33*n13+n13*n33)+0.5*(g3_n-g2_n)/(l3-l2)*n31*n21*(n33*n23+n23*n33)
    g1112_n = d11_n*n11*n11*n11*n12+d22_n*n21*n21*n21*n22+d33_n*n31*n31*n31*n32+0.5*(g1_n-g2_n)/(l1-l2)*n11*n21*(n11*n22+n21*n12)+0.5*(g1_n-g3_n)/(l1-l3)*n11*n31*(n11*n32+n31*n12)+0.5*(g2_n-g1_n)/(l2-l1)*n21*n11*(n21*n12+n11*n22)+0.5*(g2_n-g3_n)/(l2-l3)*n21*n31*(n21*n32+n31*n22)+0.5*(g3_n-g1_n)/(l3-l1)*n31*n11*(n31*n12+n11*n32)+0.5*(g3_n-g2_n)/(l3-l2)*n31*n21*(n31*n22+n21*n32)
    g1123_n = d11_n*n11*n11*n12*n13+d22_n*n21*n21*n22*n23+d33_n*n31*n31*n32*n33+0.5*(g1_n-g2_n)/(l1-l2)*n11*n21*(n12*n23+n22*n13)+0.5*(g1_n-g3_n)/(l1-l3)*n11*n31*(n12*n33+n32*n13)+0.5*(g2_n-g1_n)/(l2-l1)*n21*n11*(n22*n13+n12*n23)+0.5*(g2_n-g3_n)/(l2-l3)*n21*n31*(n22*n33+n32*n23)+0.5*(g3_n-g1_n)/(l3-l1)*n31*n11*(n32*n13+n12*n33)+0.5*(g3_n-g2_n)/(l3-l2)*n31*n21*(n32*n23+n22*n33)
    g1113_n = d11_n*n11*n11*n11*n13+d22_n*n21*n21*n21*n23+d33_n*n31*n31*n31*n33+0.5*(g1_n-g2_n)/(l1-l2)*n11*n21*(n11*n23+n21*n13)+0.5*(g1_n-g3_n)/(l1-l3)*n11*n31*(n11*n33+n31*n13)+0.5*(g2_n-g1_n)/(l2-l1)*n21*n11*(n21*n13+n11*n23)+0.5*(g2_n-g3_n)/(l2-l3)*n21*n31*(n21*n33+n31*n23)+0.5*(g3_n-g1_n)/(l3-l1)*n31*n11*(n31*n13+n11*n33)+0.5*(g3_n-g2_n)/(l3-l2)*n31*n21*(n31*n23+n21*n33)
    g2222_n = d11_n*n12*n12*n12*n12+d22_n*n22*n22*n22*n22+d33_n*n32*n32*n32*n32+0.5*(g1_n-g2_n)/(l1-l2)*n12*n22*(n12*n22+n22*n12)+0.5*(g1_n-g3_n)/(l1-l3)*n12*n32*(n12*n32+n32*n12)+0.5*(g2_n-g1_n)/(l2-l1)*n22*n12*(n22*n12+n12*n22)+0.5*(g2_n-g3_n)/(l2-l3)*n22*n32*(n22*n32+n32*n22)+0.5*(g3_n-g1_n)/(l3-l1)*n32*n12*(n32*n12+n12*n32)+0.5*(g3_n-g2_n)/(l3-l2)*n32*n22*(n32*n22+n22*n32)
    g2233_n = d11_n*n12*n12*n13*n13+d22_n*n22*n22*n23*n23+d33_n*n32*n32*n33*n33+0.5*(g1_n-g2_n)/(l1-l2)*n12*n22*(n13*n23+n23*n13)+0.5*(g1_n-g3_n)/(l1-l3)*n12*n32*(n13*n33+n33*n13)+0.5*(g2_n-g1_n)/(l2-l1)*n22*n12*(n23*n13+n13*n23)+0.5*(g2_n-g3_n)/(l2-l3)*n22*n32*(n23*n33+n33*n23)+0.5*(g3_n-g1_n)/(l3-l1)*n32*n12*(n33*n13+n13*n33)+0.5*(g3_n-g2_n)/(l3-l2)*n32*n22*(n33*n23+n23*n33)
    g2212_n = d11_n*n12*n12*n11*n12+d22_n*n22*n22*n21*n22+d33_n*n32*n32*n31*n32+0.5*(g1_n-g2_n)/(l1-l2)*n12*n22*(n11*n22+n21*n12)+0.5*(g1_n-g3_n)/(l1-l3)*n12*n32*(n11*n32+n31*n12)+0.5*(g2_n-g1_n)/(l2-l1)*n22*n12*(n21*n12+n11*n22)+0.5*(g2_n-g3_n)/(l2-l3)*n22*n32*(n21*n32+n31*n22)+0.5*(g3_n-g1_n)/(l3-l1)*n32*n12*(n31*n12+n11*n32)+0.5*(g3_n-g2_n)/(l3-l2)*n32*n22*(n31*n22+n21*n32)
    g2223_n = d11_n*n12*n12*n12*n13+d22_n*n22*n22*n22*n23+d33_n*n32*n32*n32*n33+0.5*(g1_n-g2_n)/(l1-l2)*n12*n22*(n12*n23+n22*n13)+0.5*(g1_n-g3_n)/(l1-l3)*n12*n32*(n12*n33+n32*n13)+0.5*(g2_n-g1_n)/(l2-l1)*n22*n12*(n22*n13+n12*n23)+0.5*(g2_n-g3_n)/(l2-l3)*n22*n32*(n22*n33+n32*n23)+0.5*(g3_n-g1_n)/(l3-l1)*n32*n12*(n32*n13+n12*n33)+0.5*(g3_n-g2_n)/(l3-l2)*n32*n22*(n32*n23+n22*n33)
    g2213_n = d11_n*n12*n12*n11*n13+d22_n*n22*n22*n21*n23+d33_n*n32*n32*n31*n33+0.5*(g1_n-g2_n)/(l1-l2)*n12*n22*(n11*n23+n21*n13)+0.5*(g1_n-g3_n)/(l1-l3)*n12*n32*(n11*n33+n31*n13)+0.5*(g2_n-g1_n)/(l2-l1)*n22*n12*(n21*n13+n11*n23)+0.5*(g2_n-g3_n)/(l2-l3)*n22*n32*(n21*n33+n31*n23)+0.5*(g3_n-g1_n)/(l3-l1)*n32*n12*(n31*n13+n11*n33)+0.5*(g3_n-g2_n)/(l3-l2)*n32*n22*(n31*n23+n21*n33)
    g3333_n = d11_n*n13*n13*n13*n13+d22_n*n23*n23*n23*n23+d33_n*n33*n33*n33*n33+0.5*(g1_n-g2_n)/(l1-l2)*n13*n23*(n13*n23+n23*n13)+0.5*(g1_n-g3_n)/(l1-l3)*n13*n33*(n13*n33+n33*n13)+0.5*(g2_n-g1_n)/(l2-l1)*n23*n13*(n23*n13+n13*n23)+0.5*(g2_n-g3_n)/(l2-l3)*n23*n33*(n23*n33+n33*n23)+0.5*(g3_n-g1_n)/(l3-l1)*n33*n13*(n33*n13+n13*n33)+0.5*(g3_n-g2_n)/(l3-l2)*n33*n23*(n33*n23+n23*n33)
    g3312_n = d11_n*n13*n13*n11*n12+d22_n*n23*n23*n21*n22+d33_n*n33*n33*n31*n32+0.5*(g1_n-g2_n)/(l1-l2)*n13*n23*(n11*n22+n21*n12)+0.5*(g1_n-g3_n)/(l1-l3)*n13*n33*(n11*n32+n31*n12)+0.5*(g2_n-g1_n)/(l2-l1)*n23*n13*(n21*n12+n11*n22)+0.5*(g2_n-g3_n)/(l2-l3)*n23*n33*(n21*n32+n31*n22)+0.5*(g3_n-g1_n)/(l3-l1)*n33*n13*(n31*n12+n11*n32)+0.5*(g3_n-g2_n)/(l3-l2)*n33*n23*(n31*n22+n21*n32)
    g3323_n = d11_n*n13*n13*n12*n13+d22_n*n23*n23*n22*n23+d33_n*n33*n33*n32*n33+0.5*(g1_n-g2_n)/(l1-l2)*n13*n23*(n12*n23+n22*n13)+0.5*(g1_n-g3_n)/(l1-l3)*n13*n33*(n12*n33+n32*n13)+0.5*(g2_n-g1_n)/(l2-l1)*n23*n13*(n22*n13+n12*n23)+0.5*(g2_n-g3_n)/(l2-l3)*n23*n33*(n22*n33+n32*n23)+0.5*(g3_n-g1_n)/(l3-l1)*n33*n13*(n32*n13+n12*n33)+0.5*(g3_n-g2_n)/(l3-l2)*n33*n23*(n32*n23+n22*n33)
    g3313_n = d11_n*n13*n13*n11*n13+d22_n*n23*n23*n21*n23+d33_n*n33*n33*n31*n33+0.5*(g1_n-g2_n)/(l1-l2)*n13*n23*(n11*n23+n21*n13)+0.5*(g1_n-g3_n)/(l1-l3)*n13*n33*(n11*n33+n31*n13)+0.5*(g2_n-g1_n)/(l2-l1)*n23*n13*(n21*n13+n11*n23)+0.5*(g2_n-g3_n)/(l2-l3)*n23*n33*(n21*n33+n31*n23)+0.5*(g3_n-g1_n)/(l3-l1)*n33*n13*(n31*n13+n11*n33)+0.5*(g3_n-g2_n)/(l3-l2)*n33*n23*(n31*n23+n21*n33)
    g1212_n = d11_n*n11*n12*n11*n12+d22_n*n21*n22*n21*n22+d33_n*n31*n32*n31*n32+0.5*(g1_n-g2_n)/(l1-l2)*n11*n22*(n11*n22+n21*n12)+0.5*(g1_n-g3_n)/(l1-l3)*n11*n32*(n11*n32+n31*n12)+0.5*(g2_n-g1_n)/(l2-l1)*n21*n12*(n21*n12+n11*n22)+0.5*(g2_n-g3_n)/(l2-l3)*n21*n32*(n21*n32+n31*n22)+0.5*(g3_n-g1_n)/(l3-l1)*n31*n12*(n31*n12+n11*n32)+0.5*(g3_n-g2_n)/(l3-l2)*n31*n22*(n31*n22+n21*n32)
    g1223_n = d11_n*n11*n12*n12*n13+d22_n*n21*n22*n22*n23+d33_n*n31*n32*n32*n33+0.5*(g1_n-g2_n)/(l1-l2)*n11*n22*(n12*n23+n22*n13)+0.5*(g1_n-g3_n)/(l1-l3)*n11*n32*(n12*n33+n32*n13)+0.5*(g2_n-g1_n)/(l2-l1)*n21*n12*(n22*n13+n12*n23)+0.5*(g2_n-g3_n)/(l2-l3)*n21*n32*(n22*n33+n32*n23)+0.5*(g3_n-g1_n)/(l3-l1)*n31*n12*(n32*n13+n12*n33)+0.5*(g3_n-g2_n)/(l3-l2)*n31*n22*(n32*n23+n22*n33)
    g1213_n = d11_n*n11*n12*n11*n13+d22_n*n21*n22*n21*n23+d33_n*n31*n32*n31*n33+0.5*(g1_n-g2_n)/(l1-l2)*n11*n22*(n11*n23+n21*n13)+0.5*(g1_n-g3_n)/(l1-l3)*n11*n32*(n11*n33+n31*n13)+0.5*(g2_n-g1_n)/(l2-l1)*n21*n12*(n21*n13+n11*n23)+0.5*(g2_n-g3_n)/(l2-l3)*n21*n32*(n21*n33+n31*n23)+0.5*(g3_n-g1_n)/(l3-l1)*n31*n12*(n31*n13+n11*n33)+0.5*(g3_n-g2_n)/(l3-l2)*n31*n22*(n31*n23+n21*n33)
    g2323_n = d11_n*n12*n13*n12*n13+d22_n*n22*n23*n22*n23+d33_n*n32*n33*n32*n33+0.5*(g1_n-g2_n)/(l1-l2)*n12*n23*(n12*n23+n22*n13)+0.5*(g1_n-g3_n)/(l1-l3)*n12*n33*(n12*n33+n32*n13)+0.5*(g2_n-g1_n)/(l2-l1)*n22*n13*(n22*n13+n12*n23)+0.5*(g2_n-g3_n)/(l2-l3)*n22*n33*(n22*n33+n32*n23)+0.5*(g3_n-g1_n)/(l3-l1)*n32*n13*(n32*n13+n12*n33)+0.5*(g3_n-g2_n)/(l3-l2)*n32*n23*(n32*n23+n22*n33)
    g2313_n = d11_n*n12*n13*n11*n13+d22_n*n22*n23*n21*n23+d33_n*n32*n33*n31*n33+0.5*(g1_n-g2_n)/(l1-l2)*n12*n23*(n11*n23+n21*n13)+0.5*(g1_n-g3_n)/(l1-l3)*n12*n33*(n11*n33+n31*n13)+0.5*(g2_n-g1_n)/(l2-l1)*n22*n13*(n21*n13+n11*n23)+0.5*(g2_n-g3_n)/(l2-l3)*n22*n33*(n21*n33+n31*n23)+0.5*(g3_n-g1_n)/(l3-l1)*n32*n13*(n31*n13+n11*n33)+0.5*(g3_n-g2_n)/(l3-l2)*n32*n23*(n31*n23+n21*n33)
    g1313_n = d11_n*n11*n13*n11*n13+d22_n*n21*n23*n21*n23+d33_n*n31*n33*n31*n33+0.5*(g1_n-g2_n)/(l1-l2)*n11*n23*(n11*n23+n21*n13)+0.5*(g1_n-g3_n)/(l1-l3)*n11*n33*(n11*n33+n31*n13)+0.5*(g2_n-g1_n)/(l2-l1)*n21*n13*(n21*n13+n11*n23)+0.5*(g2_n-g3_n)/(l2-l3)*n21*n33*(n21*n33+n31*n23)+0.5*(g3_n-g1_n)/(l3-l1)*n31*n13*(n31*n13+n11*n33)+0.5*(g3_n-g2_n)/(l3-l2)*n31*n23*(n31*n23+n21*n33)
    cc = (1-k)*(1-u)^2+k
    dd = if(tra1>0,(1-k)*(1-u)^2+k,1)
    g1111 = 2*mu*(cc*g1111_p+g1111_n)+lanta*dd
    g1122 = 2*mu*(cc*g1122_p+g1122_n)+lanta*dd
    g1133 = 2*mu*(cc*g1133_p+g1133_n)+lanta*dd
    g1112 = 2*mu*(cc*g1112_p+g1112_n)
    g1123 = 2*mu*(cc*g1123_p+g1123_n)
    g1113 = 2*mu*(cc*g1113_p+g1113_n)
    g2222 = 2*mu*(cc*g2222_p+g2222_n)+lanta*dd
    g2233 = 2*mu*(cc*g2233_p+g2233_n)+lanta*dd
    g2212 = 2*mu*(cc*g2212_p+g2212_n)
    g2223 = 2*mu*(cc*g2223_p+g2223_n)
    g2213 = 2*mu*(cc*g2213_p+g2213_n)
    g3333 = 2*mu*(cc*g3333_p+g3333_n)+lanta*dd
    g3312 = 2*mu*(cc*g3312_p+g3312_n)
    g3323 = 2*mu*(cc*g3323_p+g3323_n)
    g3313 = 2*mu*(cc*g3313_p+g3313_n)
    g1212 = 2*mu*(cc*g1212_p+g1212_n)
    g1223 = 2*mu*(cc*g1223_p+g1223_n)
    g1213 = 2*mu*(cc*g1213_p+g1213_n)
    g2323 = 2*mu*(cc*g2323_p+g2323_n)
    g2313 = 2*mu*(cc*g2313_p+g2313_n)
    g1313 = 2*mu*(cc*g1313_p+g1313_n)
    rex = intop1(solid.sxy)
  var2 "驱动力"
    e1_n = if(solid.ep1<0,solid.ep1,0)
    e2_n = if(solid.ep2<0,solid.ep2,0)
    e3_n = if(solid.ep3<0,solid.ep3,0)
    fai1 = mu*(e2_n-e1_n)/cos(faixx)+lanta*tra1*tan(faixx)+2*mu*(e2_n+e1_n)*tan(faixx)-Cc
    fai2 = mu*(e3_n-e2_n)/cos(faixx)+lanta*tra1*tan(faixx)+2*mu*(e3_n+e2_n)*tan(faixx)-Cc
    fai1_p = if(fai1>0,fai1,0)
    fai2_p = if(fai2>0,fai2,0)
    fai_p = 0*0.5/mu*(fai1_p^2+fai2_p^2)+fai_p11*1
    e1_p = if(solid.ep1>0,solid.ep1,0)
    e2_p = if(solid.ep2>0,solid.ep2,0)
    e3_p = if(solid.ep3>0,solid.ep3,0)
    tra1 = solid.ep1+solid.ep2+solid.ep3
    tra1_p = if(tra1>0,tra1,0)
    fai_p11 = lanta*tra1_p^2/2+mu*(e1_p^2+e2_p^2+e3_p^2)

Couplings
  intop1: Integration on boundaries 3, 7

Geometry
  geom1 "Geometry 1" (2D, length unit mm)
    r1: Rectangle | size = {0.7[mm], 1[mm]}; base = center
    r2: Rectangle | size = {0.4[mm], 0.015[mm]}; base = center; pos = {0, 0.5[mm]}; rot = 90
    r3: Rectangle "矩形 3" (disabled) | size = {0.4[mm], 0.7[mm]}; base = center; pos = {0, 0.5[mm]}
    uni1: Union | input = r1, r2, r3
    del1: Delete "Delete Entities 1" | input = uni1(1) domains 2, 3
    fin: Finalize "Form Union"

Physics
  solid: SolidMechanics "yanti" on all domains
    dependent variable u2 = {u2, v2, w2}
    ShapeProperty.order_displacement = 1
    EquationForm.form = Automatic
    Type2D.Type2D = PlaneStrain
    d.d = 1
    StructuralTransientBehavior.StructuralTransientBehavior = Quasistatic
    lemm1: LinearElasticModel "Linear Elastic Material 1" (default)
      SolidModel = Anisotropic
      IsotropicOption = Lame
      AnisotropicOption = AnisotropicStd
      E_mat = userdef
      E = E0*((1-k)*(1-u)^2+k)
      nu_mat = userdef
      nu = Nu
      lambLame_mat = userdef
      lambLame = lanta*n1
      muLame_mat = userdef
      muLame = mu*m1
      D_mat = userdef
      D = {g1111, g1122, g1133, g1112, g1123, g1113, g1122, g2222, g2233, g2212, g2223, g2213, g1133, g2233, g3333, g3312, g3323, g3313, g1112, g2212, g3312, g1212, g1223, g1213, g1123, g2223, g3323, g1223, g2323, g2313, g1113, g2213, g3313, g1213, g2313, g1313}
      rho_mat = userdef
      rho = 2450
      plsty1: Plasticity "塑性 1" (disabled) on all domains
        YieldFunction = mises
        FlowPotential = associated
        equivalentStrain = mises
        sigmags_mat = userdef
        sigmags = 0
        IsotropicHardeningModel = HardeningFunction
        Et_mat = userdef
        Et = 0
        k_lud_mat = userdef
        k_lud = 0
        n_lud_mat = from_mat
        sigmagh_mat = userdef
        sigmagh = 0[Pa]*solid.epe
        KinematicHardeningModel = NoKinematicHardening
      rock1: Rocks "岩石 1" (disabled) on all domains
        RockCriterion = OriginalHoekBrown
        GSI_mat = from_mat
        Dfactor_mat = from_mat
        miHB_mat = from_mat
        sigmauc_mat = from_mat
    free1: Free (default)
    init1: init "Initial Values 1" (default)
    fix1: Fixed "Fixed Constraint 1" on boundaries 2
    disp2: Displacement1 "Prescribed Displacement 左" on boundaries 4
      Direction = {prescribed, prescribed, free}
      U0 = {-0.5e-4[mm/s]*t*cos(nn), 0.5e-4[mm/s]*t*sin(nn), 0}
    disp1: Displacement1 "Prescribed Displacement 右" on boundaries 6
      Direction = {prescribed, prescribed, free}
      U0 = {0.5e-4[mm/s]*t*cos(nn), -0.5e-4[mm/s]*t*sin(nn), 0}
  hzeq: HelmholtzEquation "d" on all domains
    dependent variable u
    ShapeProperty.order = 1
    Units.CustomSourceTermUnit = 1
    heq1: HelmholtzEquation (default) | c = {l0^2, 0, 0, l0^2}; a = 2*l0*H*(1-k)/Gc+1; f = 2*H*l0*(1-k)/Gc
    zflx1: ZeroFluxBoundary "Zero Flux 1" (default)
    init1: init "Initial Values 1" (default) | u = 0
  dode: DomainODE "h" on all domains
    dependent variable H
    ShapeProperty.order = 1
    Units.DependentVariableQuantity = none
    Units.CustomDependentVariableUnit = J/m^3
    Units.SourceTermQuantity = none
    Units.CustomSourceTermUnit = J/m^3
    dode1: DistributedODE (default) | f = H-nojac(if(fai_p>H,fai_p,H)); da = 0
    init1: init "Initial Values 1" (default) | H = 0; HTIME = 0
  ge: GlobalEquations "全局常微分和微分代数方程" (disabled)
    EquationForm.form = Transient
    ge1: GlobalEquations "全局方程 1"
      name = s
      equation = solid.epl11
      initialValueU = solid.epl11
      valueType = complex
      fieldName = ODE1
      DependentVariableQuantity = dimensionless
      CustomDependentVariableUnit = m
      SourceTermQuantity = dimensionless
      CustomSourceTermUnit = m

Mesh
  mesh1 "Mesh 1"
    size: MeshSizeDefault | hauto = 3
    ftri4: FreeTri "自由三角形网格 4" on all domains
      size1: Size "大小 1" on no domains | hmax = 0.001; custom = on

Studies
  std1 "Study 1"
    time: Transient "Time Dependent" | tlist = range(0,1,82); rtol = 1e-4
  std2 "Study 2"
    time: Transient "Time Dependent"
      tlist = range(800,50,1000)
      rtol = 1e-4
      useinitsol = on
      initmethod = sol
      initstudy = std1
      usesol = on
      notsolmethod = sol
      notstudy = std1
      usestoresel = all

Solver configurations
  sol1 "Solver 1" (study std1)
    v1: Variables "Dependent Variables 1"
      comp1_u2: Field "位移场 (comp1.u2)" | scalemethod = manual; scaleval = 1e-2*0.00141421356237
    t1: Time "Time-Dependent Solver 1"
      tlist = range(0,1,82)
      atolglobal = 0.0010
      timemethod = genalpha
      initialstepbdf = 1
      maxstepbdf = 1
      eventtol = 1e-2
      tstepsgenalpha = strict
      initialstepgenalpha = 1
      maxstepgenalpha = 10
      rhoinf = 0
      fieldselection = comp1_u
      dDef: Direct
      se1: Segregated | segstabacc = segaacc
        ssDef: SegregatedStep "U" | segvar = {comp1_u2}
        ss1: SegregatedStep "H" | segvar = {comp1_H}
        ss2: SegregatedStep "Fai" | segvar = {comp1_u}
      ps1: PreviousSolution | prevcomp = {comp1_H}
  sol2 "Solver 2" (study std2)
    v1: Variables "Dependent Variables 1"
      comp1_u2: Field "位移场 (comp1.u2)" | scalemethod = manual; scaleval = 1e-2*0.00141421356237
    t1: Time "Time-Dependent Solver 1"
      tlist = range(800,50,1000)
      atolmethod = {comp1_H, global, comp1_u, global, comp1_u2, global}
      timemethod = genalpha
      initialstepbdf = 0.1
      maxstepbdf = 1
      eventtol = 1e-4
      stabcntrl = on
      estrat = exclude
      tstepsgenalpha = strict
      initialstepgenalpha = 0.1
      maxstepgenalpha = 1
      rhoinf = 0
      timestepgenalpha = 0.1
      fieldselection = comp1_u
      dDef: Direct
      se1: Segregated | maxsegiter = 40; segstabacc = segaacc; segaaccdim = 50
        ssDef: SegregatedStep "U" | segvar = {comp1_u2}; subminstep = 1.0E-2
        ss1: SegregatedStep "H" | segvar = {comp1_H}
        ss2: SegregatedStep "Fai" | segvar = {comp1_u}
        ll1: LowerLimit | lowerlimit = comp1.H 0
      ps1: PreviousSolution | prevcomp = {comp1_H}

Datasets
  mesh1: Mesh | mesh = mesh1
  dset1: Solution | solution = sol1
  dset2: Solution | solution = sol2

Derived values
  int1: IntLine "Line Integration 1" on boundaries 3, 7 | data = dset2; table = tbl1; expr = solid.sxy
  int2: IntLine "Line Integration 2" (disabled) on boundaries 3, 7 | data = dset2; table = new; expr = solid.sxy

Tables
  tbl1: Table
    // Line Integration 1 (solid.sxy)
    Time (s) | Stress tensor, xy component (N/m)
    800 | 490031
    810 | 495385
    820 | 501134
    830 | 506849
    840 | 512544
    850 | 518215
    860 | 523811
    870 | 529479
    880 | 535039
    890 | 540561
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
Plots
  pg7: PlotGroup2D "d" | data = dset1
    surf1: Surface | data = dset1; expr = u